// COMSOL Multiphysics 6.0.0.354 model "demoFOM.mph"
// Ideal lithium-metal cell dynamics (1d)
// This COMSOL FOM simulates a 1d DFN FOM of a LMB cell. MSMR OCP and kinetics model is implemented.
// Outline of the model tree
// Components: mod1d "1d cell FOM", mod2d "2d electrode FOM"

Parameters
  F = 96485.3365[C/mol]  // Faraday's constant
  R = 8.3144621 [J/mol/K]  // Gas constant
  thetaInitPos = theta0PosFN(0.5,T)+z0*(theta100PosFN(0.5,T)-theta0PosFN(0.5,T))  // Initial positive-electrode soc
  z0 = 0.5  // Initial cell SOC
  Ides = inputCurrent(t)  // Applied current
  Iapp = Ides  // Limited current
  T = inputTemperature(t)  // Ambient temperature
  xnorm = 1[m]
  ynorm = 1[m]
  Vnorm = 1[V]
  molnorm = 1[mol]
  Ahnorm = 1[A*h]

Functions
  an1: Analytic "Imaginary-free power" | funcname = nicePow; expr = (step(x)*abs(x))^(y); args = {x, y}
  step1: Step | funcname = step; smooth = 0.001
  Ides: Piecewise | funcname = inputCurrent; arg = t; extrap = periodic; smooth = contd2; smoothzone = 3E-7; pieces = {{0, 1, 0}, {1, 2, 0}, {2, 3, 0}, {3, 4, 0}, {4, 5, 0}, {5, 6, 0}, {6, 7, 0}, {7, 8, 0}, {8, 9, 0}}; argunit = s; fununit = A
  Temperature: Piecewise
    funcname = inputTemperature
    arg = t
    extrap = periodic
    smooth = contd2
    smoothzone = 3E-7
    pieces = {{0, 1, 298.15}, {1, 2, 298.15}, {2, 3, 298.15}, {3, 4, 298.15}, {4, 5, 298.15}, {5, 6, 298.15}, {6, 7, 298.15}, {7, 8, 298.15}, {8, 9, 298.15}}
    argunit = s
    fununit = K
  QFN: Analytic | expr = (0.29585); args = {x, T}; fununit = A*h; argunit = {mol, K}
  psiFN: Analytic | expr = (0.0017394); args = {x, T}; fununit = V/K; argunit = {mol, K}
  RcFN: Analytic | expr = (0); args = {x, T}; fununit = V/A; argunit = {mol, K}
  kDFN: Analytic | expr = (-0.00041363); args = {x, T}; fununit = V/K; argunit = {mol, K}
  UocvTAB: Interpolation
    table = 
      {0, 3.84532}
      {0.001, 3.8495}
      {0.002, 3.85333}
      {0.003, 3.85686}
      {0.004, 3.86014}
      {0.005, 3.8632}
      {0.006, 3.86607}
      {0.007, 3.86878}
      {0.008, 3.87133}
      {0.009, 3.87376}
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    extrap = linear
  UocvFN: Analytic | expr = UocvTAB(x); args = {x, T}; fununit = V; argunit = {mol, K}
  alphaNegFN: Analytic | expr = (0.7); args = {x, T}; argunit = {s/s, K}
  k0NegFN: Analytic | expr = (0.45171); args = {x, T}; fununit = A; argunit = {s/s, K}
  RfNegFN: Analytic | expr = (3.125); args = {x, T}; fununit = V/A; argunit = {s/s, K}
  CdlNegFN: Analytic | expr = (0.0012672); args = {x, T}; fununit = F; argunit = {s/s, K}
  nDLNegFN: Analytic | expr = (1); args = {x, T}; argunit = {s/s, K}
  wDLNegFN: Analytic | expr = (0); args = {x, T}; argunit = {s/s, K}
  RdlNegFN: Analytic | expr = (0); args = {x, T}; fununit = V/A; argunit = {s/s, K}
  kappaDlFN: Analytic | expr = (98.5437); args = {x, T}; fununit = S; argunit = {s/s, K}
  qeDlFN: Analytic | expr = (0.00030018); args = {x, T}; fununit = A*h; argunit = {s/s, K}
  kappaSepFN: Analytic | expr = (53.7658); args = {x, T}; fununit = S; argunit = {s/s, K}
  qeSepFN: Analytic | expr = (0.0029303); args = {x, T}; fununit = A*h; argunit = {s/s, K}
  theta0PosFN: Analytic | expr = (0.99); args = {x, T}; argunit = {s/s, K}
  theta100PosFN: Analytic | expr = (0.01); args = {x, T}; argunit = {s/s, K}
  sigmaPosFN: Analytic | expr = (241.896); args = {x, T}; fununit = S; argunit = {s/s, K}
  kappaPosFN: Analytic | expr = (5.7616); args = {x, T}; fununit = S; argunit = {s/s, K}
  DsrefPosFN: Analytic | expr = (0.00083125); args = {x, T}; fununit = 1/s; argunit = {s/s, K}
  nFPosFN: Analytic | expr = (1); args = {x, T}; argunit = {s/s, K}
  qePosFN: Analytic | expr = (0.021155); args = {x, T}; fununit = A*h; argunit = {s/s, K}
  RfPosFN: Analytic | expr = (0.047349); args = {x, T}; fununit = V/A; argunit = {s/s, K}
  CdlPosFN: Analytic | expr = (0.092928); args = {x, T}; fununit = F; argunit = {s/s, K}
  nDLPosFN: Analytic | expr = (1); args = {x, T}; argunit = {s/s, K}
  wDLPosFN: Analytic | expr = (0); args = {x, T}; argunit = {s/s, K}
  RdlPosFN: Analytic | expr = (0); args = {x, T}; fununit = V/A; argunit = {s/s, K}
  socPosFN: Analytic | expr = (0.99+x*(-0.98)); args = {x, T}; argunit = {s/s, K}
  UocpPosTAB: Interpolation
    table = 
      {0.001, 4.35266}
      {0.0011, 4.34953}
      {0.0012, 4.34669}
      {0.0013, 4.34408}
      {0.0014, 4.34167}
      {0.0015, 4.33943}
      {0.0016, 4.33734}
      {0.0017, 4.33538}
      {0.0018, 4.33354}
      {0.0019, 4.33179}
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    extrap = linear
  UocpPosFN: Analytic | expr = UocpPosTAB(x); args = {x, T}; fununit = V; argunit = {s/s, K}
  dUocpPosTAB: Interpolation
    table = 
      {0, -86.7566}
      {0.001, -32.829}
      {0.002, -16.0799}
      {0.003, -10.619}
      {0.004, -7.91898}
      {0.005, -6.31195}
      {0.006, -5.24944}
      {0.007, -4.49327}
      {0.008, -3.92807}
      {0.009, -3.49029}
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    extrap = linear
  dUocpPosFN: Analytic | expr = dUocpPosTAB(x); args = {x, T}; fununit = V; argunit = {s/s, K}
  U01PosFN: Analytic | expr = (4.16756*exp(0*(1/298.15-1/T)/8.31446)); args = {x, T}; fununit = V; argunit = {s/s, K}
  U02PosFN: Analytic | expr = (4.02477*exp(0*(1/298.15-1/T)/8.31446)); args = {x, T}; fununit = V; argunit = {s/s, K}
  X1PosFN: Analytic | expr = (0.39669*exp(0*(1/298.15-1/T)/8.31446)); args = {x, T}; argunit = {s/s, K}
  X2PosFN: Analytic | expr = (0.60331*exp(0*(1/298.15-1/T)/8.31446)); args = {x, T}; argunit = {s/s, K}
  omega1PosFN: Analytic | expr = (1.12446*exp(0*(1/298.15-1/T)/8.31446)); args = {x, T}; argunit = {s/s, K}
  omega2PosFN: Analytic | expr = (1.71031*exp(0*(1/298.15-1/T)/8.31446)); args = {x, T}; argunit = {s/s, K}
  k01PosFN: Analytic | expr = (61.5014*exp(0*(1/298.15-1/T)/8.31446)); args = {x, T}; fununit = A; argunit = {s/s, K}
  k02PosFN: Analytic | expr = (55.799*exp(0*(1/298.15-1/T)/8.31446)); args = {x, T}; fununit = A; argunit = {s/s, K}
  alpha1PosFN: Analytic | expr = (0.2*exp(0*(1/298.15-1/T)/8.31446)); args = {x, T}; argunit = {s/s, K}
  alpha2PosFN: Analytic | expr = (0.71307*exp(0*(1/298.15-1/T)/8.31446)); args = {x, T}; argunit = {s/s, K}
  JPosFN: Analytic | expr = (2); args = {x, T}; argunit = {s/s, K}

Variables
  varsNeg1d "Dead Li and Negative-Electrode variables" [mod1d] on domains 1
    PARAMETERS = 0  // --------------------------------------------
    kappa = kappaDlFN(theta_e,T)
    qe = qeDlFN(0.5,T)
    ifdl = 0[A]  // No flux in dead Li layer
  varsSep1d "Separator variables" [mod1d] on domains 2
    PARAMETERS = 0  // --------------------------------------------
    kappa = kappaSepFN(theta_e,T)
    qe = qeSepFN(0.5,T)
    ifdl = 0[A]  // No flux in separator
  varsPos1d "Positive-electrode variables" [mod1d] on domains 3
    PARAMETERS = 0  // --------------------------------------------
    sigma = sigmaPosFN(thetass,T)
    kappa = kappaPosFN(theta_e,T)
    qe = qePosFN(0.5,T)
    Rf = RfPosFN(thetass,T)
    Rdl = RdlPosFN(thetass,T)
    Cdl = CdlPosFN(thetass,T)
    VARIABLES = 0  // --------------------------------------------
    extrcpl_source_influx = -if  // Input lithium flux to pseudoDim
    thetass = pseudoDim.pos_ss(extrcpl_source_thetass)  // Surface concentration ratio
    thetasavg = pseudoDim.pos_ss(socavg)  // thetasavg(x,t)
    thetasavg_pos = posint(thetasavg)/xnorm  // thetasavg(t)
    J = JposFN(thetass,T)  // Number of MSMR galleries.
    eta = phi_s-phi_e-Uss-Rf*ifdl  // Surface Overpotential
    SOLVE_if_idl = 0  // --------------------------------------------
    if0 = if-if_msmr  // Faradaic rate (intercalation, MSMR)
    idl0 = idl-Cdl*(phi_st-phi_et-Rf*(ift+idlt))+Rdl*Cdl*idlt  // Non-faradaic rate (double-layer)
    ifdl = if+idl  // Total interface lithium flux
    SOLVE_MSMR = 0  // --------------------------------------------
    Uss = pseudoDim.pos_ss(extrcpl_source_U)  // Solid-surface potential.
    x1ss = pseudoDim.pos_ss(extrcpl_source_x1)  // Gallery partial lithiation, j=1
    x2ss = pseudoDim.pos_ss(extrcpl_source_x2)  // Gallery partial lithiation, j=2
    U01 = U01PosFN(0.5,T)
    U02 = U02PosFN(0.5,T)
    X1 = X1PosFN(0.5,T)
    X2 = X2PosFN(0.5,T)
    omega1 = omega1PosFN(0.5,T)
    omega2 = omega2PosFN(0.5,T)
    k01 = k01PosFN(0.5,T)
    k02 = k02PosFN(0.5,T)
    alpha1 = alpha1PosFN(0.5,T)
    alpha2 = alpha2PosFN(0.5,T)
    i01 = k01*nicePow(x1ss,omega1*alpha1)*nicePow(X1-x1ss,omega1*(1-alpha1))*nicePow(theta_e,1-alpha1)
    if1 = i01*( exp((1-alpha1)*F*eta/R/T) - exp(-alpha1*F*eta/R/T) )
    i02 = k02*nicePow(x2ss,omega2*alpha2)*nicePow(X2-x2ss,omega2*(1-alpha2))*nicePow(theta_e,1-alpha2)
    if2 = i02*( exp((1-alpha2)*F*eta/R/T) - exp(-alpha2*F*eta/R/T) )
    i0_sum = + i01 + i02  // Total exchange current.
    if_msmr = + if1 + if2  // Total faradaic flux.
  var1 "Anode interface" [mod1d] on boundaries 1
    PARAMETERS = 0  // --------------------------------------------
    eta = -phi_e-Rf*Iapp  // Overpotential
    SOLVE_if_idl = 0  // --------------------------------------------
    ifn0 = ifn - k0*(exp((1-alpha)*F*eta/(R*T)) - exp(-alpha*F*eta/(R*T)))
    k0 = k0NegFN(0.5,T)
    alpha = alphaNegFN(0.5,T)
    i0 = (k0*nicePow(theta_e,1-alpha))  // Exchange current
    Rf = RfNegFN(0.5,T)
    Rdl = RdlNegFN(0.5,T)
    Cdl = CdlNegFN(0.5,T)
    idln0 = idln - Cdl*(-phi_et-Rf*(ifnt+idlnt)) + Rdl*Cdl*idlnt
    ifdln = ifn +idln
    phise0 = -phi_e
  varsPos2d "Positive-electrode variables" [mod2d] on domains 1
    theta0 = theta0PosFN(0.5,T)
    theta100 = theta100PosFN(0.5,T)
    soc = theta_s  // Solid concentration ratio at any locations of the particle
    socavg = 3*linproj2(theta_s*(y^2))/(ynorm^3)
    thetaInit = thetaInitPos  // Initial local state of charge
    Ds = nojac(-DsrefPosFN(0.5,T)*F/(R*T)*abs(soc*(soc-1))*dUdThetas)
    U01 = U01PosFN(0.5,T)
    U02 = U02PosFN(0.5,T)
    X1 = X1PosFN(0.5,T)
    X2 = X2PosFN(0.5,T)
    omega1 = omega1PosFN(0.5,T)
    omega2 = omega2PosFN(0.5,T)
    k01 = k01PosFN(0.5,T)
    k02 = k02PosFN(0.5,T)
    alpha1 = alpha1PosFN(0.5,T)
    alpha2 = alpha2PosFN(0.5,T)
    g1 = exp((U-U01)*F/R/T/omega1)
    x1 = X1/(1+g1)
    dx1dU = -(F/R/T)*X1*g1/omega1/(1+g1)^2
    g2 = exp((U-U02)*F/R/T/omega2)
    x2 = X2/(1+g2)
    dx2dU = -(F/R/T)*X2*g2/omega2/(1+g2)^2
    theta_s = + x1 + x2
    dThetasdU = + dx1dU + dx2dU
    dUdThetas = 1/dThetasdU
  cplvar7 "Positive-electrode boundary" [mod2d] on boundaries 3
    thetass_influx = mainDim.pos_thetass(extrcpl_source_influx)  // Interfacial lithium flux at the particle surface (input from mainDim)
    extrcpl_source_thetass = theta_s  // Output surface concentration back to mainDim
    extrcpl_source_U = U  // Output surface potential back to mainDim
    extrcpl_source_x1 = x1  // Output partial lithiation x1 back to mainDim
    extrcpl_source_x2 = x2  // Output partial lithiation x2 back to mainDim

Couplings
  linext2: LinearExtrusion "Linear extrusion, positive electrode" on domains 3
    opname = pos_thetass
    srcvertex1 = boundaries 3
    srcvertex2 = boundaries 4
    dstvertex1 = points 2
    dstvertex2 = points 4
    dstgeom = geom2d
    dstframe = material
    srcframe = material
    srcmap = x
  linext4: LinearExtrusion "Linear extrusion, positive electrode" on boundaries 3
    opname = pos_ss
    srcvertex1 = points 2
    srcvertex2 = points 4
    dstvertex1 = boundaries 3
    dstvertex2 = boundaries 4
    dstgeom = geom1d
    dstframe = material
    srcframe = material
    srcmap = {x, y}
  linproj2: LinearProjection on domains 1
    srcvertex1 = points 1
    srcvertex2 = points 3
    srcvertex3 = points 2
    dstvertex1 = points 1
    dstvertex2 = points 3
    dstgeom = geom2d
  genproj2: GeneralProjection (disabled) on domains 1 | dstmap = x; srcmap = {x, y}
  negint: Integration "Dead Li Layer integration" on domains 1
  posint: Integration "Positive-electrode integration" on domains 3

Geometry
  geom1d "Geometry" [mod1d] (1D, length unit m)
    I1: Interval | coordsource = vector; coordvec = range(0,1,3); intervals = many; p = range(0,1,3)
    fin: Finalize "Form Union"
  geom2d "2d electrode geometry" [mod2d] (2D, length unit m)
    Pos: Square "Positive electrode" | pos = 2.0,0.0
    fin: Finalize "Form Union"

Physics
  phi_s: GeneralFormPDE "Solid charge conservation" [mod1d] on domains 3
    dependent variable phi_s
    ShapeProperty.boundaryFlux = 0
    Units.DependentVariableQuantity = electricpotential
    Units.SourceTermQuantity = current
    Units.CustomSourceTermUnit = V
    gfeq1: GeneralFormPDE (default) | f = -ifdl; Ga = -sigma*phi_sx*(xnorm^2); da = 0
    zflx1: ZeroFluxBoundary "Zero Flux 1" (default)
    init1: init "Initial Values 1" (default)
    init2: init "Initial Values 2" on domains 3 | phi_s = UocpPosFN(thetaInitPos,T)
    cons1: Constraint on boundaries 1 | R = phi_s
    flux1: FluxBoundary "Flux/Source 1" on boundaries 4 | g = -Iapp*xnorm
  phi_e: GeneralFormPDE "Electrolyte charge conservation" [mod1d] on all domains
    dependent variable phi_e
    ShapeProperty.boundaryFlux = 0
    Units.DependentVariableQuantity = electricpotential
    Units.SourceTermQuantity = current
    gfeq1: GeneralFormPDE (default) | f = ifdl; Ga = -kappa*(phi_ex+kDFN(0.5,T)*T*1/theta_e*theta_ex)*(xnorm^2); da = 0
    zflx1: ZeroFluxBoundary "Zero Flux 1" (default)
    init1: init "Initial Values 1" (default) | phi_e = 0
    flux1: FluxBoundary "Flux/Source 1" on boundaries 1 | g = (ifn+idln)*xnorm
  U: ConvectionDiffusionEquation "Solid diffusion" [mod2d] on all domains
    dependent variable U
    ShapeProperty.boundaryFlux = 0
    Units.DependentVariableQuantity = none
    Units.CustomDependentVariableUnit = V
    Units.CustomSourceTermUnit = 1/s
    cdeq1: ConvectionDiffusionEquation "Solid diffusion" (default)
      f = 0
      c = {0, 0, 0, (y^2)*DsrefPosFN(0.5,T)*(F/R/T)*soc*(soc-1)}
      da = ((y/ynorm)^2)*dThetasdU
    zflx1: ZeroFluxBoundary "Zero Flux 1" (default)
    init1: init "Initial Values 1" (default) | U = 0
    flux1: FluxBoundary "Flux/Source 1" on boundaries 3
      g = thetass_influx/(10800[s/h]*QFN(0.5,T))*abs(theta100-theta0)*ynorm
  theta_e: ConvectionDiffusionEquation "Electrolyte diffusion" [mod1d] on all domains
    dependent variable theta_e
    ShapeProperty.boundaryFlux = 0
    Units.DependentVariableQuantity = none
    Units.CustomDependentVariableUnit = 1
    Units.CustomSourceTermUnit = A
    cdeq1: ConvectionDiffusionEquation (default) | f = ifdl; c = psiFN(0.5,T)*T*kappa*(xnorm^2); da = 3600[s/h]*qe
    zflx1: ZeroFluxBoundary "Zero Flux 1" (default)
    init1: init "Initial Values 1" (default) | theta_e = 1
    zflx2: ZeroFluxBoundary "Zero Flux 2" on boundaries 4
    flux1: FluxBoundary "Flux/Source 1" on boundaries 1 | g = Iapp*xnorm
  if: DomainODE "Faradaic interface lithium flux" [mod1d] on domains 3
    dependent variable if
    Units.DependentVariableQuantity = none
    Units.CustomDependentVariableUnit = A
    Units.CustomSourceTermUnit = A
    dode1: DistributedODE (default) | f = if0; da = 0
    init1: init "Initial Values 1" (default)
  idl: DomainODE "Non-faradaic molar flow rate" [mod1d] on domains 3
    dependent variable idl
    Units.DependentVariableQuantity = none
    Units.CustomDependentVariableUnit = A
    Units.CustomSourceTermUnit = A
    dode1: DistributedODE (default) | f = idl0; da = 0
    init1: init "Initial Values 1" (default)
  ifn: BoundaryODE "Faradaic interface lithium flux at anode" [mod1d] on boundaries 1
    dependent variable ifn
    Units.DependentVariableQuantity = current
    Units.SourceTermQuantity = current
    dode1: DistributedODE (default) | f = ifn0; da = 0
    init1: init "Initial Values 1" (default)
  idln: BoundaryODE "Non-faradaic molar flow rate at anode" [mod1d] on boundaries 1
    dependent variable idln
    Units.DependentVariableQuantity = current
    Units.SourceTermQuantity = current
    dode1: DistributedODE (default) | f = idln0; da = 0
    init1: init "Initial Values 1" (default)

Mesh
  mesh1d "Mesh" [geom1d]
    size: MeshSizeDefault | hmax = 0.201; hmin = 9.0E-4; hcurve = 0.3; hgrad = 1.3
    E1: Edge on remaining entities
      D1: Distribution "Dead Li Layer" on domains 1
        type = predefined
        elemcount = 20
        elemratio = 0.5
        method = geometric
      D2: Distribution "Separator" on domains 2
        type = predefined
        reverse = on
        elemcount = 20
        elemratio = 0.5
        symmetric = on
      D3: Distribution "Positive electrode" on domains 3
        type = predefined
        reverse = on
        elemcount = 20
        elemratio = 0.5
        method = geometric
  mesh2d "Mesh 2" [geom2d]
    size: MeshSizeDefault | hauto = 3; custom = on
    ftri1: FreeTri "Free Triangular 1" on remaining entities | yscale = 0.5
      dis1: Distribution on boundaries 3 | numelem = 600

Studies
  std1 "Study"
    time: Transient "Time Dependent" | tlist = range(0.01,1,9.01); usertol = on; rtol = 0.0001

Solver configurations
  sol1 "Solver" (study std1)
    v1: Variables "Dependent Variables 1"
    t1: Time "Time-Dependent Solver 1"
      tlist = range(0,1,9)
      rtol = 0.0001
      atolglobalmethod = unscaled
      atolglobalvaluemethod = manual
      atolglobal = 0.0001
      atolvaluemethod = {mainDim_phi_e, manual, mainDim_phi_s, manual, pseudoDim_U, manual, mainDim_theta_e, manual, mainDim_if, factor, mainDim_idl, factor}
      tstepsbdf = strict
      initialstepbdf = 0.0010
      maxstepconstraintbdf = const
      bwinitstepfrac = 1.0
      d1: Direct | linsolver = pardiso; pardreorder = ndmt

Datasets
  dset1: Solution "1d solution pulses" | solution = sol1
  dset2: Solution "2d solution pulses" | solution = sol1

Plots
  pg3: PlotGroup1D "phi_s vs x"
    data = dset1
    title = Solid potential <B> \phi<sub>s</sub></B>
    xlabel = Normalized x-coordinate (unitless)
    ylabel = Potential (V)
    lngr1: LineGraph on all domains | data = dset1; expr = phi_s; xdata = expr; xdataexpr = x
  pg4: PlotGroup1D "phi_e vs x"
    data = dset1
    title = Electrolyte potential <B>\phi<sub>e</sub></B>
    xlabel = Normalized x-coordinate (unitless)
    ylabel = Potential (V)
    lngr1: LineGraph on all domains | expr = phi_e; xdata = expr; xdataexpr = x
  pg5: PlotGroup1D "theta_e vs x"
    data = dset1
    title = Electrolyte concentration ratio<B> \theta<sub>e</sub></B>
    xlabel = Normalized x-coordinate (unitless)
    ylabel = Concentration ratio (unitless)
    lngr1: LineGraph on all domains | expr = theta_e; xdata = expr; xdataexpr = x
  pg6: PlotGroup2D "theta_s vs (x,r)"
    data = dset2
    suffixintitle = : Solid concentration ratio <B>\theta<sub>s</sub></B>
    typeintitle = off
    descriptionintitle = off
    xlabel = Normalized x-coordinate (unitless)
    ylabel = Normalized y-coordinate (unitless)
    surf1: Surface | expr = U
  pg7: PlotGroup1D "Cell voltage"
    data = dset1
    title = Cell voltage profile
    xlabel = Time (s)
    ylabel = Cell voltage (V)
    ptgr2: PointGraph "Plot of cell voltage" on boundaries 4
      data = dset1
      expr = phi_s - Iapp*RcFN(1,T)
      descr = Cell voltage
  pg8: PlotGroup1D "theta_ss vs x"
    data = dset1
    title = Solid surface concentration ratio<B> \theta<sub>ss</sub></B>
    xlabel = Normalized x-coordinate (unitless)
    ylabel = Concentration ratio (unitless)
    lngr1: LineGraph on all domains
      expr = thetass
      title = Solid surface concentration (mol/m^3)
      xdata = expr
      xdataexpr = x/xnorm
  pg14: PlotGroup1D "theta_savg vs (x,t)"
    data = dset1
    title = Solid average concentration ratio<B> \theta<sub>s,avg</sub></B>
    xlabel = Normalized x-coordinate (unitless)
    ylabel = Concentration ratio (unitless)
    lngr1: LineGraph on all domains
      expr = thetasavg
      descr = Average solid particle concentration ratio
      xdata = expr
      xdataexpr = x
  pg17: PlotGroup1D "theta_savg_pos vs (t)"
    data = dset1
    title = Positive-electrode solid average concentration ratio<B> \theta<sub>s,avg</sub></B>
    xlabel = Time (s)
    ylabel = Concentration ratio (unitless)
    ptgr2: PointGraph "Plot of cathode average concentration ratio" on boundaries 3 | data = dset1; expr = thetasavg_pos
  pg15: PlotGroup2D "theta_savg vs (x,r,t)"
    data = dset2
    suffixintitle = : Solid average concentration ratio <B>\theta<sub>s,avg</sub></B>
    typeintitle = off
    descriptionintitle = off
    xlabel = Normalized x-coordinate (unitless)
    ylabel = Normalized y-coordinate (unitless)
    surf1: Surface | expr = socavg
  pg9: PlotGroup1D "if vs x"
    data = dset1
    title = Faradaic (intercalation) interface lithium flux <B>i<sub>f</sub></B>
    xlabel = Normalized x-coordinate (unitless)
    ylabel = Flux (A)
    lngr1: LineGraph on all domains | expr = if; xdata = expr; xdataexpr = x
  pg10: PlotGroup1D "idl vs x"
    data = dset1
    title = Non-faradaic (double-layer) interface lithium flux <B>i<sub>dl</sub> </B>
    xlabel = Normalized x-coordinate (unitless)
    ylabel = Flux (A)
    lngr1: LineGraph on all domains | expr = idl; xdata = expr; xdataexpr = x
  pg12: PlotGroup1D "Input current"
    data = dset1
    title = Input current profile
    xlabel = Time (s)
    ylabel = Input current (A)
    ptgr2: PointGraph "Plot of input current" on boundaries 4 | data = dset1; expr = Iapp; descr = Input current
  pg13: PlotGroup1D "phi_se vs x"
    data = dset1
    title = Phase potential difference <B> \phi<sub>s-e</sub></B>
    xlabel = Normalized x-coordinate (unitless)
    ylabel = Potential (V)
    lngr1: LineGraph on all domains | data = dset1; expr = phi_s-phi_e; xdata = expr; xdataexpr = x

Exports
  data9: Data "Input current"
    data = dset1
    expr = Iapp
    descr = Constant current
    filename = C:\Users\whileman\Desktop\TOOLBOX_LMB - Copy/Iapp.txt
  data6: Data "if"
    data = dset1
    expr = if
    unit = A
    descr = Dependent variable if
    filename = C:\Users\whileman\Desktop\TOOLBOX_LMB - Copy/If.txt
  data8: Data "idl"
    data = dset1
    expr = idl
    unit = A
    descr = Dependent variable idl
    filename = C:\Users\whileman\Desktop\TOOLBOX_LMB - Copy/Idl.txt
  data2: Data "phis"
    data = dset1
    expr = phi_s
    unit = V
    descr = Dependent variable phi_s
    filename = C:\Users\whileman\Desktop\TOOLBOX_LMB - Copy/Phis.txt
  data3: Data "phie"
    data = dset1
    expr = phi_e
    unit = V
    descr = Dependent variable phi_e
    filename = C:\Users\whileman\Desktop\TOOLBOX_LMB - Copy/Phie.txt
  data7: Data "phise"
    data = dset1
    expr = phi_s-phi_e
    unit = V
    filename = C:\Users\whileman\Desktop\TOOLBOX_LMB - Copy/Phise.txt
  data5: Data "thetae"
    data = dset1
    expr = theta_e
    unit = 1
    filename = C:\Users\whileman\Desktop\TOOLBOX_LMB - Copy/Thetae.txt
  data4: Data "thetass"
    data = dset1
    expr = thetass
    unit = 1
    filename = C:\Users\whileman\Desktop\TOOLBOX_LMB - Copy/Thetass.txt
  data10: Data "thetasavg_neg vs (t)"
    data = dset1
    expr = thetasavg_neg
    unit = 1
    filename = C:\Users\whileman\Desktop\TOOLBOX_LMB - Copy/ThetasAvgNeg.txt
  data11: Data "thetasavg_pos vs (t)"
    data = dset1
    expr = thetasavg_pos
    unit = 1
    filename = C:\Users\whileman\Desktop\TOOLBOX_LMB - Copy/ThetasAvgPos.txt
  data12: Data "thetasavg"
    data = dset1
    expr = thetasavg
    unit = 1
    filename = C:\Users\whileman\Desktop\TOOLBOX_LMB - Copy/ThetasAvg.txt